! Auto-generated APDL batch for 144 variants
/CWD,'C:\temp'
*CFOPEN,results,csv
*VWRITE,'r','Kf','Km','Ky','Kz','PSI'
(A8,',',A8,',',A8,',',A14,',',A14,',',A14)
*CFCLOSE

! ===== CASE 1: r=0.1, Kf=20, Km=20 =====
/CLEAR,NOSTART
/FILNAME,case_001,1
/TITLE,Hexagonal cell case 1
/UNITS,SI
PI=4*ATAN(1)
*AFUN,DEG
a=1
b=TAN(60)
r=0.1
TT=100
TP=0
Kf=20
Km=20

/PREP7
ANTYPE,STATIC
ET,1,PLANE77

MP,KXX,1,Kf
MP,KXX,2,Km

RECTNG,,a,,b
CYL4,0,0,r
CYL4,a,b,r

LSEL,S,,,1
LSEL,A,,,4
ASBL,2,ALL

LSEL,S,,,2
LSEL,A,,,3
ASBL,3,ALL

ASEL,S,,,5
ASEL,A,,,6
ADELE,ALL,,,1
ALLSEL,ALL

APTN,ALL

ASEL,S,,,3
AATT,2,,1,0
ALLSEL,ALL

ASEL,U,,,3
AATT,1,,1,0
ALLSEL,ALL

AESIZE,ALL,0.02
MSHAPE,0,2D
MSHKEY,0
AMESH,ALL

NSEL,S,LOC,Y,0
D,ALL,TEMP,TT

NSEL,S,LOC,Y,b
D,ALL,TEMP,0
ALLSEL,ALL

NSEL,S,LOC,X,0
F,ALL,HEAT,0

NSEL,S,LOC,X,a
F,ALL,HEAT,0
ALLSEL,ALL

/SOLU
SOLVE
FINISH

/POST1
SET,FIRST

ETABLE,,VOLU
ETABLE,,TF,X
ETABLE,,TF,Y
ETABLE,,TF,Z

SMULT,TFXV,VOLU,TFX
SMULT,TFYV,VOLU,TFY
SMULT,TFZV,VOLU,TFZ
SSUM

*GET,TOTVOL,SSUM,,ITEM,VOLU
*GET,TOTTFX,SSUM,,ITEM,TFXV
*GET,TOTTFY,SSUM,,ITEM,TFYV
*GET,TOTTFZ,SSUM,,ITEM,TFZV

TFX0=TOTTFX/TOTVOL
TFY0=TOTTFY/TOTVOL
TFZ0=TOTTFZ/TOTVOL

Ky=TFY0/(TT/b)
Kz=(Kf*2*PI*r*r/4 + Km*(a*b-2*PI*r*r/4))/(a*b)
PSI=2*PI*r*r/4/(a*b)

*GET,NNODE,NODE,0,COUNT
*GET,NELEM,ELEM,0,COUNT

*GET,NNODE,NODE,0,COUNT
*GET,NELEM,ELEM,0,COUNT

*CFOPEN,results_gex,txt,,APPEND
*VWRITE,r,Kf,Km,PSI,TFY0,Ky,Kz,NNODE,NELEM,TOTVOL
(F10.5,',',F10.5,',',F10.5,',',F12.6,',',E16.8,',',F12.6,',',F12.6,',',F12.0,',',F12.0,',',E16.8)
*CFCLOS
FINISH

/EXIT,NOSAVE
